*Heading
** Job name: lowres Model name: Model-1
** Generated by: Abaqus/CAE 2018
*Preprint, echo=NO, model=NO, history=NO, contact=NO
**
** PARTS
**
*Part, name=Part-1
*End Part
**
**
** ASSEMBLY
**
*Assembly, name=Assembly
**
*Instance, name=Part-1-1, part=Part-1
         10.,           0.,          10.
         10.,           0.,          10., 8.99999998731195,           0.,          10., 89.9999992730282
*Node
      1,         -10.,         -10.,          60.
      2,           0.,         -10.,          60.
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*Element, type=C3D8
    1,    43,   200,     8,     1,  1534,  1691,  1499,  1492
    2,   200,   201,     9,     8,  1691,  1692,  1500,  1499
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*Nset, nset=Set-1, generate
     1,  31311,      1
*Elset, elset=Set-1, generate
     1,  28000,      1
** Section: tops
*Solid Section, elset=Set-1, material=tops
,
*End Instance
**
*Nset, nset=Set-1, instance=Part-1-1
     3,     4,     5,    26,    27,    28
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*Elset, elset=Set-1, instance=Part-1-1
    91,    92,    93,    94,    95,    96
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*Nset, nset=Set-3, instance=Part-1-1
     6,     7,   103,   104,   105,   106
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*Elset, elset=Set-3, instance=Part-1-1
  1381,  1382,  1383,  1384,  1385,  1386
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*Nset, nset=full, instance=Part-1-1
  17,  18,  19,  20,  21,  22
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*Nset, nset=half, instance=Part-1-1
   2,   3,   8,   9,  10,  11
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*Nset, nset=quarter, instance=Part-1-1
   1,   4, 199, 281
*Elset, elset=_Surf-1_S1, internal, instance=Part-1-1, generate
    1,  1400,     1
*Surface, type=ELEMENT, name=Surf-1
_Surf-1_S1, S1
*Elset, elset=_Surf-2_S1, internal, instance=Part-1-1, generate
   1,  100,    1
*Surface, type=ELEMENT, name=Surf-2
_Surf-2_S1, S1
*End Assembly
**
** MATERIALS
**
*Material, name=tops
*Elastic
1., 0.3
** ----------------------------------------------------------------
**
** STEP: Step-1
**
*Step, name=Step-1, nlgeom=YES
*Static
1., 1., 1e-05, 1.
**
** BOUNDARY CONDITIONS
**
** Name: BC-1 Type: Symmetry/Antisymmetry/Encastre
*Boundary
Set-3, ENCASTRE
**
** LOADS
**
** Name: full   Type: Concentrated force
*Cload
full, 3, 0.03
** Name: half   Type: Concentrated force
*Cload
half, 3, 0.015
** Name: quarter   Type: Concentrated force
*Cload
quarter, 3, 0.0075
**
** OUTPUT REQUESTS
**
*Restart, write, frequency=0
**
** FIELD OUTPUT: F-Output-1
**
*Output, field
*Node Output
CF, RF, TF, U, UR
*Element Output, directions=YES
EEQUT, LE, MVF, P, PE, PEEQ, PEMAG, S, SEQUT, TE, TEEQ, TEVOL, TRNOR, TRSHR
*Contact Output
CDISP, CSTRESS
**
** HISTORY OUTPUT: H-Output-1
**
*Output, history, variable=PRESELECT
*End Step
